# OpenSim document version 40600
InverseKinematicsTool swing_weldfix_check:
  results_directory: /Users/enricomartini/Desktop/opensim-batch-dynamics/outputs/OpenSim/IK/swing_weldfix_check
  model_file: /Users/enricomartini/Desktop/opensim-batch-dynamics/outputs/OpenSim/Model/swing_weldfix_check/LaiUhlrich2022_torque_only_scaled.osim
  constraint_weight: Inf
  accuracy: 1e-5
  time_range: 0 10.65
  output_motion_file: /Users/enricomartini/Desktop/opensim-batch-dynamics/outputs/OpenSim/IK/swing_weldfix_check/swing_weldfix_check.mot
  report_errors: true
  marker_file: /Users/enricomartini/Desktop/opensim-batch-dynamics/outputs/MarkerData/swing_weldfix_check/swing_weldfix_check.trc
  report_marker_locations: false
  IKTaskSet:
    IKMarkerTask C7: apply=true weight=15
    IKMarkerTask sternum: apply=true weight=15
    IKMarkerTask r_ASIS: apply=true weight=5
    IKMarkerTask l_ASIS: apply=true weight=5
    IKMarkerTask r_PSIS: apply=true weight=5
    IKMarkerTask l_PSIS: apply=true weight=5
    IKMarkerTask r_knee: apply=true weight=10
    IKMarkerTask r_mknee: apply=false weight=10
    IKMarkerTask r_ankle: apply=true weight=10
    IKMarkerTask r_mankle: apply=true weight=10
    IKMarkerTask r_toe: apply=true weight=15
    IKMarkerTask r_5meta: apply=true weight=15
    IKMarkerTask r_calc: apply=true weight=15
    IKMarkerTask l_knee: apply=true weight=10
    IKMarkerTask l_mknee: apply=false weight=10
    IKMarkerTask l_ankle: apply=true weight=10
    IKMarkerTask l_mankle: apply=true weight=10
    IKMarkerTask l_toe: apply=true weight=15
    IKMarkerTask l_calc: apply=true weight=15
    IKMarkerTask l_5meta: apply=true weight=15
    IKMarkerTask r_melbow: apply=true weight=5
    IKMarkerTask r_elbow: apply=true weight=5
    IKMarkerTask r_wrist_radius: apply=true weight=5
    IKMarkerTask r_wrist_ulna: apply=true weight=5
    IKMarkerTask l_melbow: apply=true weight=5
    IKMarkerTask l_elbow: apply=true weight=5
    IKMarkerTask l_wrist_radius: apply=true weight=5
    IKMarkerTask l_wrist_ulna: apply=true weight=5
    IKMarkerTask RShoulder: apply=false weight=5
    IKMarkerTask LShoulder: apply=false weight=5
    IKMarkerTask T6: apply=true weight=15
    IKCoordinateTask lumbar_extension: apply=true weight=0.0005 value_type=manual_value value=-0.2094395
