# OpenSim document version 40600
Model LaiUhlrich2022_torque_only_scaled:
  gravity: 0 -9.80665 0
  length_units: meters
  force_units: N
  credits:
    Rajagopal et al. (2016), Lai et al. (2017), Uhlrich et al. (2022)
  publications:
    Rajagopal, A., Dembia, C.L., DeMers, M.S., Delp, D.D., Hicks, J.L., Delp, S.L. (2016) Full-body musculoskeletal model for muscle-driven simulation of human gait. IEEE Transactions on Biomedical Engineering.
  Ground
  BodySet:
    Body pelvis: mass=11.72432 [kg] mass_center=(-0.09594503 0 0) inertia=(0.09913367 0.09913367 0.1061543 0 0 0)
        meshes=(r_pelvis.vtp l_pelvis.vtp sacrum.vtp)
      WrapCylinder Gmax1_at_pelvis_r: xyz_body_rotation=(-0.6 0.45 0) translation=(-0.1044946 -0.1343502 0.04828071)
          quadrant=-x radius=0.05007997 length=0.1622838
      WrapCylinder Gmax2_at_pelvis_r: xyz_body_rotation=(-0.75 0.39 0) translation=(-0.1085658 -0.112637 0.05382112)
          quadrant=all radius=0.04904057 length=0.1133625
      WrapCylinder Gmax3_at_pelvis_r: xyz_body_rotation=(-0.1 0 0) translation=(-0.112637 -0.1194224 0.05382112)
          quadrant=all radius=0.05419351 length=0.07991015
      WrapCylinder Gmax1_at_pelvis_l: xyz_body_rotation=(0.6 -0.45 0) translation=(-0.1044946 -0.1343502 -0.04828071)
          quadrant=-x radius=0.05007997 length=0.1622838
      WrapCylinder Gmax2_at_pelvis_l: xyz_body_rotation=(0.75 -0.39 0) translation=(-0.1085658 -0.112637 -0.05382112)
          quadrant=all radius=0.04904057 length=0.1133625
      WrapCylinder Gmax3_at_pelvis_l: xyz_body_rotation=(0.1 0 0) translation=(-0.112637 -0.1194224 -0.05382112)
          quadrant=all radius=0.05419351 length=0.07991015
      WrapCylinder PS_at_brim_r: xyz_body_rotation=(-0.25 -0.27 0.1) translation=(-0.1004234 -0.08142435 0.05192155)
          quadrant=-y radius=0.06640506 length=0.08843054
      WrapCylinder PS_at_brim_l: xyz_body_rotation=(0.25 0.27 0.1) translation=(-0.1004234 -0.08142435 -0.05192155)
          quadrant=-y radius=0.06640506 length=0.08843054
      WrapCylinder IL_at_brim_r: xyz_body_rotation=(-0.32 -0.24 0.9) translation=(-0.09635215 -0.08820972 0.05983642)
          quadrant=-y radius=0.07262036 length=0.08992025
      WrapCylinder IL_at_brim_l: xyz_body_rotation=(0.32 0.24 0.9) translation=(-0.09635215 -0.08820972 -0.05983642)
          quadrant=-y radius=0.07262036 length=0.08992025
    Body femur_r: mass=9.259793 mass_center=(0 -0.1534049 0) inertia=(0.1085461 0.02845383 0.1144638 0 0 0)
        meshes=r_femur.vtp
      WrapCylinder GasLat_at_condyles_r: translation=(0.004511909 -0.3699765 0) quadrant=all radius=0.02346193
          length=0.09023818
      WrapCylinder GasMed_at_condyles_r: translation=(0.004511909 -0.3699765 0) quadrant=all radius=0.02255955
          length=0.09023818
      WrapCylinder KnExt_at_fem_r: xyz_body_rotation=(-0.0623366 0.0507601 0)
          translation=(0.003237999 -0.363418 0.00188698) quadrant=all radius=0.02255955 length=0.09023818
      WrapCylinder KnExtVL_at_fem_r: xyz_body_rotation=(-0.0623366 0.0507601 0)
          translation=(0.00170395 -0.363418 0.00188698) quadrant=all radius=0.02255955 length=0.09023818
      WrapCylinder AB_at_femshaft_r: xyz_body_rotation=(1.66157 0.186644 0)
          translation=(0.01321394 -0.1016037 0.02108415) quadrant=all radius=0.0148893 length=0.06316673
      WrapCylinder AL_at_femshaft_r: xyz_body_rotation=(1.77711 0.136489 0)
          translation=(0.02773263 -0.2092705 0.01363833) quadrant=all radius=0.01813787 length=0.09023818
      WrapCylinder AMprox_at_femshaft_r: xyz_body_rotation=(1.61126 0.18656 0)
          translation=(0.004677036 -0.06577894 0.02292321) quadrant=all radius=0.01904026 length=0.06316673
      WrapCylinder AMmid_at_femshaft_r: xyz_body_rotation=(1.61139 0.13656 0)
          translation=(0.02076606 -0.1450227 0.01857481) quadrant=all radius=0.01931097 length=0.1082858
      WrapCylinder AMdist_at_femshaft_r: xyz_body_rotation=(1.71188 0.186636 0)
          translation=(0.02852113 -0.2352834 0.008450445) quadrant=all radius=0.01967192 length=0.1804764
      WrapCylinder AMisch_at_condyles_r: xyz_body_rotation=(1.71115 -0.463363 0)
          translation=(-0.02043994 -0.3400454 -0.002846446) quadrant=all radius=0.03609527 length=0.2165716
      WrapCylinder PECT_at_femshaft_r: xyz_body_rotation=(1.81295 0.276344 0)
          translation=(0.005491652 -0.07625388 0.02746895) quadrant=all radius=0.01353573 length=0.04511909
    Body tibia_r: mass=3.690915 mass_center=(0 -0.1979804 0) inertia=(0.05642078 0.005709246 0.0572044 0 0 0)
        meshes=(r_tibia.vtp r_fibula.vtp)
      WrapCylinder GasLat_at_shank_r: xyz_body_rotation=(2.96723 -0.279725 -1.47812)
          translation=(-0.007847106 -0.07847106 -0.003499385) quadrant=-y radius=0.05832309 length=0.106042
      WrapCylinder GasMed_at_shank_r: xyz_body_rotation=(2.96723 0.0279725 -1.47812)
          translation=(-0.007847106 -0.07847106 -0.003499385) quadrant=-y radius=0.06256477 length=0.106042
      WrapCylinder GR_at_condyles_r: xyz_body_rotation=(0 -0.4 0) translation=(-0.003181259 -0.0212084 0) quadrant=all
          radius=0.03817511 length=0.106042
      WrapCylinder SM_at_condyles_r: xyz_body_rotation=(0 -0.1 0) translation=(-0.00106042 -0.0212084 0) quadrant=all
          radius=0.03658448 length=0.106042
      WrapCylinder ST_at_condyles_r: xyz_body_rotation=(0 -0.2 0) translation=(-0.00212084 -0.02173861 0) quadrant=all
          radius=0.04506784 length=0.106042
      WrapCylinder BF_at_gastroc_r: translation=(-0.04135637 -0.06362519 0) quadrant=y radius=0.03075217
          length=0.159063
    Body patella_r: mass=0.08581441 mass_center=(0.001624287 0.02382288 0)
        inertia=(2.326567e-6 1.062763e-5 1.062763e-5 0 0 0) meshes=r_patella.vtp
    Body talus_r: mass=0.09955268 mass_center=(0 0 0) inertia=(0.001284388 0.001284388 0.001284388 0 0 0)
        meshes=r_talus.vtp
    Body calcn_r: mass=1.244408 mass_center=(0.1135852 0.03407556 0)
        inertia=(0.001798144 0.005009115 0.005265993 0 0 0) meshes=r_foot.vtp
    Body toes_r: mass=0.2156311 mass_center=(0.03930048 0.006815112 -0.01987741)
        inertia=(0.0001284388 0.0002568777 0.001284388 0 0 0) meshes=r_bofoot.vtp
    Body femur_l: mass=9.259793 mass_center=(0 -0.1589594 0) inertia=(0.1165488 0.03055163 0.1229029 0 0 0)
        meshes=l_femur.vtp
      WrapCylinder GasLat_at_condyles_l: translation=(0.004675275 -0.3833726 0) quadrant=all radius=0.02431143
          length=0.0935055
      WrapCylinder GasMed_at_condyles_l: translation=(0.004675275 -0.3833726 0) quadrant=all radius=0.02337638
          length=0.0935055
      WrapCylinder KnExt_at_fem_l: xyz_body_rotation=(0.0623366 -0.0507601 0)
          translation=(0.003355239 -0.3765766 -0.001955303) quadrant=all radius=0.02337638 length=0.0935055
      WrapCylinder KnExtVL_at_fem_l: xyz_body_rotation=(0.0623366 -0.0507601 0)
          translation=(0.001765646 -0.3765766 -0.001955303) quadrant=all radius=0.02337638 length=0.0935055
      WrapCylinder AB_at_femshaft_l: xyz_body_rotation=(-1.66157 -0.186644 0)
          translation=(0.01369238 -0.1052825 -0.02184756) quadrant=all radius=0.01542841 length=0.06545385
      WrapCylinder AL_at_femshaft_l: xyz_body_rotation=(-1.77711 -0.136489 0)
          translation=(0.02873677 -0.2168477 -0.01413214) quadrant=all radius=0.01879461 length=0.0935055
      WrapCylinder AMprox_at_femshaft_l: xyz_body_rotation=(-1.61126 -0.18656 0)
          translation=(0.004846381 -0.06816065 -0.0237532) quadrant=all radius=0.01972966 length=0.06545385
      WrapCylinder AMmid_at_femshaft_l: xyz_body_rotation=(-1.61139 -0.13656 0)
          translation=(0.02151795 -0.1502736 -0.01924736) quadrant=all radius=0.02001018 length=0.1122066
      WrapCylinder AMdist_at_femshaft_l: xyz_body_rotation=(-1.71188 -0.186636 0)
          translation=(0.02955382 -0.2438025 -0.008756416) quadrant=all radius=0.0203842 length=0.187011
      WrapCylinder AMisch_at_condyles_l: xyz_body_rotation=(-1.71115 0.463363 0)
          translation=(-0.02118002 -0.3523577 0.00294951) quadrant=all radius=0.0374022 length=0.2244132
      WrapCylinder PECT_at_femshaft_l: xyz_body_rotation=(-1.81295 -0.276344 0)
          translation=(0.005690492 -0.07901486 -0.02846354) quadrant=all radius=0.01402583 length=0.04675275
    Body tibia_l: mass=3.690915 mass_center=(0 -0.1980315 0) inertia=(0.05644992 0.005712194 0.05723395 0 0 0)
        meshes=(l_tibia.vtp l_fibula.vtp)
      WrapCylinder GasLat_at_shank_l: xyz_body_rotation=(-2.96723 0.279725 -1.47812)
          translation=(-0.007849132 -0.07849132 0.003500289) quadrant=-y radius=0.05833814 length=0.1060694
      WrapCylinder GasMed_at_shank_l: xyz_body_rotation=(-2.96723 -0.0279725 -1.47812)
          translation=(-0.007849132 -0.07849132 0.003500289) quadrant=-y radius=0.06258092 length=0.1060694
      WrapCylinder GR_at_condyles_l: xyz_body_rotation=(0 0.4 0) translation=(-0.003182081 -0.02121387 0) quadrant=all
          radius=0.03818497 length=0.1060694
      WrapCylinder SM_at_condyles_l: xyz_body_rotation=(0 0.1 0) translation=(-0.001060694 -0.02121387 0) quadrant=all
          radius=0.03659393 length=0.1060694
      WrapCylinder ST_at_condyles_l: xyz_body_rotation=(0 0.2 0) translation=(-0.002121387 -0.02174422 0) quadrant=all
          radius=0.04507948 length=0.1060694
      WrapCylinder BF_at_gastroc_l: translation=(-0.04136705 -0.06364161 0) quadrant=all radius=0.03076011
          length=0.159104
    Body patella_l: mass=0.08581441 mass_center=(0.001683099 0.02468545 0)
        inertia=(2.498096e-6 1.141116e-5 1.141116e-5 0 0 0) meshes=l_patella.vtp
    Body talus_l: mass=0.09955268 mass_center=(0 0 0) inertia=(0.001286104 0.001286104 0.001286104 0 0 0)
        meshes=l_talus.vtp
    Body calcn_l: mass=1.244408 mass_center=(0.113661 0.0340983 0) inertia=(0.001800545 0.005015804 0.005273025 0 0 0)
        meshes=l_foot.vtp
    Body toes_l: mass=0.2156311 mass_center=(0.03932671 0.006819661 0.01989068)
        inertia=(0.0001286104 0.0002572207 0.001286104 0 0 0) meshes=l_bofoot.vtp
    Body torso: mass=26.7066 mass_center=(-0.04595819 0.3472581 0) inertia=(2.014601 1.457649 2.014601 0 0 0)
        meshes=(hat_spine.vtp hat_jaw.vtp hat_skull.vtp hat_ribs_scap.vtp)
    Body humerus_r: mass=2.023408 mass_center=(0 -0.1652111 0) inertia=(0.01199532 0.004138013 0.01346436 0 0 0)
        meshes=humerus_rv.vtp
    Body ulna_r: mass=0.6047825 mass_center=(0 -0.1223322 0) inertia=(0.003037843 0.0006338241 0.00329527 0 0 0)
        meshes=ulna_rv.vtp
    Body radius_r: mass=0.6047825 mass_center=(0 -0.1223322 0) inertia=(0.003037843 0.0006338241 0.00329527 0 0 0)
        meshes=radius_rv.vtp
    Body hand_r: mass=0.4554535 mass_center=(0 -0.06911605 0) inertia=(0.00091484 0.0005610061 0.001374311 0 0 0)
        meshes=(pisiform_rvs.vtp lunate_rvs.vtp scaphoid_rvs.vtp triquetrum_rvs.vtp hamate_rvs.vtp capitate_rvs.vtp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)
    Body humerus_l: mass=2.023408 mass_center=(0 -0.163874 0) inertia=(0.01180193 0.0040713 0.01324728 0 0 0)
        meshes=humerus_lv.vtp
    Body ulna_l: mass=0.6047825 mass_center=(0 -0.1223372 0) inertia=(0.003038093 0.0006338762 0.003295541 0 0 0)
        meshes=ulna_lv.vtp
    Body radius_l: mass=0.6047825 mass_center=(0 -0.1223372 0) inertia=(0.003038093 0.0006338762 0.003295541 0 0 0)
        meshes=radius_lv.vtp
    Body hand_l: mass=0.4554535 mass_center=(0 -0.06911889 0) inertia=(0.0009149152 0.0005610522 0.001374424 0 0 0)
        meshes=(pisiform_lvs.vtp lunate_lvs.vtp scaphoid_lvs.vtp triquetrum_lvs.vtp hamate_lvs.vtp capitate_lvs.vtp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)
  JointSet:
    CustomJoint ground_pelvis: socket_parent_frame=ground_offset socket_child_frame=pelvis_offset
      Coordinate pelvis_tilt: default_value=0 range=(-1.570796 1.570796) clamped=true
      Coordinate pelvis_list: default_value=0 range=(-1.570796 1.570796) clamped=true
      Coordinate pelvis_rotation: default_value=0 range=(-6.283185 6.283185) clamped=true
      Coordinate pelvis_tx: default_value=0 range=(-50 50) clamped=true
      Coordinate pelvis_ty: default_value=0.93 range=(-1 2) clamped=true
      Coordinate pelvis_tz: default_value=0 range=(-50 50) clamped=true
      PhysicalOffsetFrame ground_offset: socket_parent=/ground translation=(0 0 0) [meters]
      PhysicalOffsetFrame pelvis_offset: socket_parent=/bodyset/pelvis translation=(0 0 0)
      SpatialTransform:
        TransformAxis rotation1: coordinates=pelvis_tilt axis=(0 0 1) LinearFunction(coefficients=1 0)
        TransformAxis rotation2: coordinates=pelvis_list axis=(1 0 0) LinearFunction(coefficients=1 0)
        TransformAxis rotation3: coordinates=pelvis_rotation axis=(0 1 0) LinearFunction(coefficients=1 0)
        TransformAxis translation1: coordinates=pelvis_tx axis=(1 0 0) LinearFunction(coefficients=1 0)
        TransformAxis translation2: coordinates=pelvis_ty axis=(0 1 0) LinearFunction(coefficients=1 0)
        TransformAxis translation3: coordinates=pelvis_tz axis=(0 0 1) LinearFunction(coefficients=1 0)
    CustomJoint hip_r: socket_parent_frame=pelvis_offset socket_child_frame=femur_r_offset
      Coordinate hip_flexion_r: default_value=0 range=(-0.5235988 2.094395) clamped=true
      Coordinate hip_adduction_r: default_value=0 range=(-0.8726646 0.5235988) clamped=true
      Coordinate hip_rotation_r: default_value=0 range=(-0.6981317 0.6981317) clamped=true
      PhysicalOffsetFrame pelvis_offset: socket_parent=/bodyset/pelvis translation=(-0.07637062 -0.1065166 0.06115029)
      PhysicalOffsetFrame femur_r_offset: socket_parent=/bodyset/femur_r translation=(0 0 0)
      SpatialTransform: axes_held_at_zero=(translation1 translation2 translation3)
        TransformAxis rotation1: coordinates=hip_flexion_r axis=(0 0 1) LinearFunction(coefficients=1 0)
        TransformAxis rotation2: coordinates=hip_adduction_r axis=(1 0 0) LinearFunction(coefficients=1 0)
        TransformAxis rotation3: coordinates=hip_rotation_r axis=(0 1 0) LinearFunction(coefficients=1 0)
    CustomJoint walker_knee_r: socket_parent_frame=femur_r_offset socket_child_frame=tibia_r_offset
      Coordinate knee_angle_r: default_value=0 range=(0 2.443461) clamped=true
      PhysicalOffsetFrame femur_r_offset: socket_parent=/bodyset/femur_r
          translation=(-0.004060718 -0.3696156 -0.001579168) orientation=(-1.64157 1.44618 1.5708) [radians]
      PhysicalOffsetFrame tibia_r_offset: socket_parent=/bodyset/tibia_r
          translation=(-0.008578308 -0.003748372 -0.001574448) orientation=(-1.64157 1.44618 1.5708)
      SpatialTransform:
        TransformAxis rotation1: coordinates=knee_angle_r axis=(1 0 0) LinearFunction(coefficients=1 0)
        TransformAxis rotation2: coordinates=knee_angle_r axis=(0 0 1)
          PolynomialFunction: coefficients=(0.01083209 -0.02521833 -0.03284781 0.07910001 -1.473252e-8)
        TransformAxis rotation3: coordinates=knee_angle_r axis=(0 1 0)
          PolynomialFunction: coefficients=(0.02516576 -0.1694801 0.3694993 -4.430358e-8)
        TransformAxis translation1: coordinates=knee_angle_r axis=(1 0 0)
          MultiplierFunction: scale=0.9023818
            PolynomialFunction: coefficients=(0.0001590448 -0.00101515 0.001817511 2.641427e-5 -7.746564e-7)
        TransformAxis translation2: coordinates=knee_angle_r axis=(0 1 0)
          MultiplierFunction: scale=0.9023818
            PolynomialFunction: coefficients=(-0.0005796878 0.005079766 -0.01144238 0.003936909 -2.51635e-5)
        TransformAxis translation3: coordinates=knee_angle_r axis=(0 0 1)
          MultiplierFunction: scale=0.9023818
            PolynomialFunction: coefficients=(0.001208087 -0.004453611 0.0006116494 0.00626543 -1.461913e-5)
    CustomJoint patellofemoral_r: socket_parent_frame=femur_r_offset socket_child_frame=patella_r_offset
      Coordinate knee_angle_r_beta: default_value=0 range=(-99999.9 99999.9) clamped=false
      PhysicalOffsetFrame femur_r_offset: socket_parent=/bodyset/femur_r
          translation=(-0.007300269 -0.3681357 -0.00248155)
      PhysicalOffsetFrame patella_r_offset: socket_parent=/bodyset/patella_r translation=(0 0 0)
      SpatialTransform: axes_held_at_zero=(rotation2 rotation3)
        TransformAxis rotation1: coordinates=knee_angle_r_beta axis=(0 0 1)
          SimmSpline: x=(0 0.174533 0.349066 0.523599 0.698132 0.872665 1.0472 1.22173 1.39626 1.5708 1.74533 1.91986 2.0944)
              y=(0.00113686 -0.00629212 -0.105582 -0.253683 -0.414245 -0.579047 -0.747244 -0.91799 -1.09044 -1.26379 -1.43763 -1.61186 -1.78634)
        TransformAxis translation1: coordinates=knee_angle_r_beta axis=(1 0 0)
          MultiplierFunction: scale=0.9023818
            SimmSpline: x=(0 0.174533 0.349066 0.523599 0.698132 0.872665 1.0472 1.22173 1.39626 1.5708 1.74533 1.91986 2.0944)
                y=(0.0524 0.0488 0.0437 0.0371 0.0296 0.0216 0.0136 0.0057 -0.0019 -0.0088 -0.0148 -0.0196 -0.0227)
        TransformAxis translation2: coordinates=knee_angle_r_beta axis=(0 1 0)
          MultiplierFunction: scale=0.9023818
            SimmSpline: x=(0 0.174533 0.349066 0.523599 0.698132 0.872665 1.0472 1.22173 1.39626 1.5708 1.74533 1.91986 2.0944)
                y=(-0.0108 -0.019 -0.0263 -0.0322 -0.0367 -0.0395 -0.0408 -0.0404 -0.0384 -0.0349 -0.0301 -0.0245 -0.0187)
        TransformAxis translation3: axis=(0 0 1) MultiplierFunction(scale=0.9023818, Constant(value=0.00275))
    PinJoint ankle_r: socket_parent_frame=tibia_r_offset socket_child_frame=talus_r_offset
      Coordinate ankle_angle_r: default_value=0 range=(-0.8726646 0.8726646) clamped=true
      PhysicalOffsetFrame tibia_r_offset: socket_parent=/bodyset/tibia_r translation=(-0.0106042 -0.4241679 0)
          orientation=(0.175895 -0.105208 0.0186622)
      PhysicalOffsetFrame talus_r_offset: socket_parent=/bodyset/talus_r translation=(0 0 0)
          orientation=(0.175895 -0.105208 0.0186622)
    PinJoint subtalar_r: socket_parent_frame=talus_r_offset socket_child_frame=calcn_r_offset
      Coordinate subtalar_angle_r: default_value=0 range=(-0.6108652 0.6108652) clamped=true
      PhysicalOffsetFrame talus_r_offset: socket_parent=/bodyset/talus_r
          translation=(-0.0553955 -0.04764899 0.008995947) orientation=(-1.76819 0.906223 1.8196)
      PhysicalOffsetFrame calcn_r_offset: socket_parent=/bodyset/calcn_r translation=(0 0 0)
          orientation=(-1.76819 0.906223 1.8196)
    PinJoint mtp_r: socket_parent_frame=calcn_r_offset socket_child_frame=toes_r_offset
      Coordinate mtp_angle_r: default_value=0 range=(-0.7853982 0.5235988) clamped=true
      PhysicalOffsetFrame calcn_r_offset: socket_parent=/bodyset/calcn_r
          translation=(0.2030903 -0.002271704 0.00122672) orientation=(-3.14159 0.619901 0)
      PhysicalOffsetFrame toes_r_offset: socket_parent=/bodyset/toes_r translation=(0 0 0)
          orientation=(-3.14159 0.619901 0)
    CustomJoint hip_l: socket_parent_frame=pelvis_offset socket_child_frame=femur_l_offset
      Coordinate hip_flexion_l: default_value=0 range=(-0.5235988 2.094395) clamped=true
      Coordinate hip_adduction_l: default_value=0 range=(-0.8726646 0.5235988) clamped=true
      Coordinate hip_rotation_l: default_value=0 range=(-0.6981317 0.6981317) clamped=true
      PhysicalOffsetFrame pelvis_offset: socket_parent=/bodyset/pelvis translation=(-0.07637062 -0.1065166 -0.06115029)
      PhysicalOffsetFrame femur_l_offset: socket_parent=/bodyset/femur_l translation=(0 0 0)
      SpatialTransform: axes_held_at_zero=(translation1 translation2 translation3)
        TransformAxis rotation1: coordinates=hip_flexion_l axis=(0 0 1) LinearFunction(coefficients=1 0)
        TransformAxis rotation2: coordinates=hip_adduction_l axis=(1 0 0) LinearFunction(coefficients=-1 0)
        TransformAxis rotation3: coordinates=hip_rotation_l axis=(0 1 0) LinearFunction(coefficients=-1 0)
    CustomJoint walker_knee_l: socket_parent_frame=femur_l_offset socket_child_frame=tibia_l_offset
      Coordinate knee_angle_l: default_value=0 range=(0 2.443461) clamped=true
      PhysicalOffsetFrame femur_l_offset: socket_parent=/bodyset/femur_l
          translation=(-0.004207748 -0.3829985 0.001636346) orientation=(1.64157 -1.44618 1.5708)
      PhysicalOffsetFrame tibia_l_offset: socket_parent=/bodyset/tibia_l
          translation=(-0.008580523 -0.00374934 0.001574854) orientation=(1.64157 -1.44618 1.5708)
      SpatialTransform:
        TransformAxis rotation1: coordinates=knee_angle_l axis=(-1 0 0) LinearFunction(coefficients=1 0)
        TransformAxis rotation2: coordinates=knee_angle_l axis=(0 0 1)
          PolynomialFunction: coefficients=(0.01083209 -0.02521833 -0.03284781 0.07910001 -1.473252e-8)
        TransformAxis rotation3: coordinates=knee_angle_l axis=(0 1 0)
          PolynomialFunction: coefficients=(-0.02516576 0.1694801 -0.3694993 4.430358e-8)
        TransformAxis translation1: coordinates=knee_angle_l axis=(1 0 0)
          MultiplierFunction: scale=0.935055
            PolynomialFunction: coefficients=(0.0001590448 -0.00101515 0.001817511 2.641427e-5 -7.746564e-7)
        TransformAxis translation2: coordinates=knee_angle_l axis=(0 1 0)
          MultiplierFunction: scale=0.935055
            PolynomialFunction: coefficients=(-0.0005796878 0.005079766 -0.01144238 0.003936909 -2.51635e-5)
        TransformAxis translation3: coordinates=knee_angle_l axis=(0 0 1)
          MultiplierFunction: scale=0.935055
            PolynomialFunction: coefficients=(-0.001208087 0.004453611 -0.0006116494 -0.00626543 1.461913e-5)
    CustomJoint patellofemoral_l: socket_parent_frame=femur_l_offset socket_child_frame=patella_l_offset
      Coordinate knee_angle_l_beta: default_value=0 range=(-99999.9 99999.9) clamped=false
      PhysicalOffsetFrame femur_l_offset: socket_parent=/bodyset/femur_l
          translation=(-0.007564595 -0.381465 0.002571401)
      PhysicalOffsetFrame patella_l_offset: socket_parent=/bodyset/patella_l translation=(0 0 0)
      SpatialTransform: axes_held_at_zero=(rotation2 rotation3)
        TransformAxis rotation1: coordinates=knee_angle_l_beta axis=(0 0 1)
          SimmSpline: x=(0 0.174533 0.349066 0.523599 0.698132 0.872665 1.0472 1.22173 1.39626 1.5708 1.74533 1.91986 2.0944)
              y=(0.00113686 -0.00629212 -0.105582 -0.253683 -0.414245 -0.579047 -0.747244 -0.91799 -1.09044 -1.26379 -1.43763 -1.61186 -1.78634)
        TransformAxis translation1: coordinates=knee_angle_l_beta axis=(1 0 0)
          MultiplierFunction: scale=0.935055
            SimmSpline: x=(0 0.174533 0.349066 0.523599 0.698132 0.872665 1.0472 1.22173 1.39626 1.5708 1.74533 1.91986 2.0944)
                y=(0.0524 0.0488 0.0437 0.0371 0.0296 0.0216 0.0136 0.0057 -0.0019 -0.0088 -0.0148 -0.0196 -0.0227)
        TransformAxis translation2: coordinates=knee_angle_l_beta axis=(0 1 0)
          MultiplierFunction: scale=0.935055
            SimmSpline: x=(0 0.174533 0.349066 0.523599 0.698132 0.872665 1.0472 1.22173 1.39626 1.5708 1.74533 1.91986 2.0944)
                y=(-0.0108 -0.019 -0.0263 -0.0322 -0.0367 -0.0395 -0.0408 -0.0404 -0.0384 -0.0349 -0.0301 -0.0245 -0.0187)
        TransformAxis translation3: axis=(0 0 1) MultiplierFunction(scale=0.935055, Constant(value=-0.00275))
    PinJoint ankle_l: socket_parent_frame=tibia_l_offset socket_child_frame=talus_l_offset
      Coordinate ankle_angle_l: default_value=0 range=(-0.8726646 0.8726646) clamped=true
      PhysicalOffsetFrame tibia_l_offset: socket_parent=/bodyset/tibia_l translation=(-0.01060694 -0.4242774 0)
          orientation=(-0.175895 0.105208 0.0186622)
      PhysicalOffsetFrame talus_l_offset: socket_parent=/bodyset/talus_l translation=(0 0 0)
          orientation=(-0.175895 0.105208 0.0186622)
    PinJoint subtalar_l: socket_parent_frame=talus_l_offset socket_child_frame=calcn_l_offset
      Coordinate subtalar_angle_l: default_value=0 range=(-0.6108652 0.6108652) clamped=true
      PhysicalOffsetFrame talus_l_offset: socket_parent=/bodyset/talus_l
          translation=(-0.05543247 -0.04768079 -0.009001952) orientation=(1.76819 -0.906223 1.8196)
      PhysicalOffsetFrame calcn_l_offset: socket_parent=/bodyset/calcn_l translation=(0 0 0)
          orientation=(1.76819 -0.906223 1.8196)
    PinJoint mtp_l: socket_parent_frame=calcn_l_offset socket_child_frame=toes_l_offset
      Coordinate mtp_angle_l: default_value=0 range=(-0.7853982 0.5235988) clamped=true
      PhysicalOffsetFrame calcn_l_offset: socket_parent=/bodyset/calcn_l
          translation=(0.2032259 -0.00227322 -0.001227539) orientation=(-3.14159 -0.619901 0)
      PhysicalOffsetFrame toes_l_offset: socket_parent=/bodyset/toes_l translation=(0 0 0)
          orientation=(-3.14159 -0.619901 0)
    CustomJoint back: socket_parent_frame=pelvis_offset socket_child_frame=torso_offset
      Coordinate lumbar_extension: default_value=0 range=(-1.570796 1.570796) clamped=true
      Coordinate lumbar_bending: default_value=0 range=(-1.570796 1.570796) clamped=true
      Coordinate lumbar_rotation: default_value=0 range=(-1.570796 1.570796) clamped=true
      PhysicalOffsetFrame pelvis_offset: socket_parent=/bodyset/pelvis translation=(-0.1366572 0.1106014 0)
      PhysicalOffsetFrame torso_offset: socket_parent=/bodyset/torso translation=(0 0 0)
      SpatialTransform: axes_held_at_zero=(translation1 translation2 translation3)
        TransformAxis rotation1: coordinates=lumbar_extension axis=(0 0 1) LinearFunction(coefficients=1 0)
        TransformAxis rotation2: coordinates=lumbar_bending axis=(1 0 0) LinearFunction(coefficients=1 0)
        TransformAxis rotation3: coordinates=lumbar_rotation axis=(0 1 0) LinearFunction(coefficients=1 0)
    CustomJoint acromial_r: socket_parent_frame=torso_offset socket_child_frame=humerus_r_offset
      Coordinate arm_flex_r: default_value=0 range=(-10 10) clamped=true
      Coordinate arm_add_r: default_value=-1.43 range=(-10 10) clamped=true
      Coordinate arm_rot_r: default_value=0 range=(-10 10) clamped=true
      PhysicalOffsetFrame torso_offset: socket_parent=/bodyset/torso translation=(-0.02604297 0.3814414 0.2150666)
      PhysicalOffsetFrame humerus_r_offset: socket_parent=/bodyset/humerus_r translation=(0 0 0)
      SpatialTransform: axes_held_at_zero=(translation1 translation2 translation3)
        TransformAxis rotation1: coordinates=arm_flex_r axis=(0 0 1) LinearFunction(coefficients=1 0)
        TransformAxis rotation2: coordinates=arm_add_r axis=(1 0 0) LinearFunction(coefficients=1 0)
        TransformAxis rotation3: coordinates=arm_rot_r axis=(0 1 0) LinearFunction(coefficients=1 0)
    PinJoint elbow_r: socket_parent_frame=humerus_r_offset socket_child_frame=ulna_r_offset
      Coordinate elbow_flex_r: default_value=0 range=(0 2.618) clamped=true
      PhysicalOffsetFrame humerus_r_offset: socket_parent=/bodyset/humerus_r
          translation=(0.01320066 -0.2875071 -0.009636362) orientation=(-0.0228627 0.228018 0.0051689)
      PhysicalOffsetFrame ulna_r_offset: socket_parent=/bodyset/ulna_r translation=(0 0 0)
          orientation=(-0.0228627 0.228018 0.0051689)
    PinJoint radioulnar_r: socket_parent_frame=ulna_r_offset socket_child_frame=radius_r_offset
      Coordinate pro_sup_r: default_value=0 range=(0 2.09) clamped=true
      PhysicalOffsetFrame ulna_r_offset: socket_parent=/bodyset/ulna_r translation=(-0.006827868 -0.01320203 0.0264741)
          orientation=(-1.56884 0.056428 1.53614)
      PhysicalOffsetFrame radius_r_offset: socket_parent=/bodyset/radius_r translation=(0 0 0)
          orientation=(-1.56884 0.056428 1.53614)
    PinJoint radius_hand_r: socket_parent_frame=radius_r_offset socket_child_frame=hand_r_offset
      Coordinate radius_hand_r_lock: default_value=0 range=(0 0) clamped=true locked=true
      PhysicalOffsetFrame radius_r_offset: socket_parent=/bodyset/radius_r
          translation=(-0.008928906 -0.2393773 0.01381407) orientation=(-1.5708 0 -1.5708)
      PhysicalOffsetFrame hand_r_offset: socket_parent=/bodyset/hand_r translation=(0 0 0)
          orientation=(-1.5708 0 -1.5708)
    CustomJoint acromial_l: socket_parent_frame=torso_offset socket_child_frame=humerus_l_offset
      Coordinate arm_flex_l: default_value=0 range=(-10 10) clamped=true
      Coordinate arm_add_l: default_value=-1.43 range=(-10 10) clamped=true
      Coordinate arm_rot_l: default_value=0 range=(-10 10) clamped=true
      PhysicalOffsetFrame torso_offset: socket_parent=/bodyset/torso translation=(-0.02604297 0.3814414 -0.2150666)
      PhysicalOffsetFrame humerus_l_offset: socket_parent=/bodyset/humerus_l translation=(0 0 0)
      SpatialTransform: axes_held_at_zero=(translation1 translation2 translation3)
        TransformAxis rotation1: coordinates=arm_flex_l axis=(0 0 1) LinearFunction(coefficients=1 0)
        TransformAxis rotation2: coordinates=arm_add_l axis=(-1 0 0) LinearFunction(coefficients=1 0)
        TransformAxis rotation3: coordinates=arm_rot_l axis=(0 -1 0) LinearFunction(coefficients=1 0)
    PinJoint elbow_l: socket_parent_frame=humerus_l_offset socket_child_frame=ulna_l_offset
      Coordinate elbow_flex_l: default_value=0 range=(0 2.618) clamped=true
      PhysicalOffsetFrame humerus_l_offset: socket_parent=/bodyset/humerus_l
          translation=(0.01309382 -0.2851801 0.009558368) orientation=(0.0228627 -0.228018 0.0051689)
      PhysicalOffsetFrame ulna_l_offset: socket_parent=/bodyset/ulna_l translation=(0 0 0)
          orientation=(0.0228627 -0.228018 0.0051689)
    PinJoint radioulnar_l: socket_parent_frame=ulna_l_offset socket_child_frame=radius_l_offset
      Coordinate pro_sup_l: default_value=0 range=(0 2.09) clamped=true
      PhysicalOffsetFrame ulna_l_offset: socket_parent=/bodyset/ulna_l
          translation=(-0.006828148 -0.01320258 -0.02647519) orientation=(1.56884 -0.056428 1.53614)
      PhysicalOffsetFrame radius_l_offset: socket_parent=/bodyset/radius_l translation=(0 0 0)
          orientation=(1.56884 -0.056428 1.53614)
    PinJoint radius_hand_l: socket_parent_frame=radius_l_offset socket_child_frame=hand_l_offset
      Coordinate radius_hand_l_lock: default_value=0 range=(0 0) clamped=true locked=true
      PhysicalOffsetFrame radius_l_offset: socket_parent=/bodyset/radius_l
          translation=(-0.008929273 -0.2393871 -0.01381464) orientation=(1.5708 0 1.5708)
      PhysicalOffsetFrame hand_l_offset: socket_parent=/bodyset/hand_l translation=(0 0 0)
          orientation=(1.5708 0 1.5708)
  ConstraintSet:
    CoordinateCouplerConstraint patellofemoral_knee_angle_r_con: independent_coordinate_names=knee_angle_r
        dependent_coordinate_name=knee_angle_r_beta scale_factor=1
        coupled_coordinates_function=LinearFunction(coefficients=1 0)
    CoordinateCouplerConstraint patellofemoral_knee_angle_l_con: independent_coordinate_names=knee_angle_l
        dependent_coordinate_name=knee_angle_l_beta scale_factor=1
        coupled_coordinates_function=LinearFunction(coefficients=1 0)
  ForceSet:
    CoordinateActuator lumbar_ext: coordinate=lumbar_extension optimal_force=10
    CoordinateActuator lumbar_bend: coordinate=lumbar_bending optimal_force=10
    CoordinateActuator lumbar_rot: coordinate=lumbar_rotation optimal_force=10
    CoordinateActuator shoulder_flex_r: coordinate=arm_flex_r optimal_force=10
    CoordinateActuator shoulder_add_r: coordinate=arm_add_r optimal_force=10
    CoordinateActuator shoulder_rot_r: coordinate=arm_rot_r optimal_force=10
    CoordinateActuator elbow_flex_r: coordinate=elbow_flex_r optimal_force=10
    CoordinateActuator pro_sup_r: coordinate=pro_sup_r optimal_force=10
    CoordinateActuator shoulder_flex_l: coordinate=arm_flex_l optimal_force=10
    CoordinateActuator shoulder_add_l: coordinate=arm_add_l optimal_force=10
    CoordinateActuator shoulder_rot_l: coordinate=arm_rot_l optimal_force=10
    CoordinateActuator elbow_flex_l: coordinate=elbow_flex_l optimal_force=10
    CoordinateActuator pro_sup_l: coordinate=pro_sup_l optimal_force=10
    CoordinateActuator pelvis_tilt: coordinate=pelvis_tilt optimal_force=10
    CoordinateActuator pelvis_list: coordinate=pelvis_list optimal_force=10
    CoordinateActuator pelvis_rotation: coordinate=pelvis_rotation optimal_force=10
    CoordinateActuator pelvis_tx: coordinate=pelvis_tx optimal_force=100
    CoordinateActuator pelvis_ty: coordinate=pelvis_ty optimal_force=100
    CoordinateActuator pelvis_tz: coordinate=pelvis_tz optimal_force=100
    CoordinateActuator hip_flexion_r: coordinate=hip_flexion_r optimal_force=10
    CoordinateActuator hip_adduction_r: coordinate=hip_adduction_r optimal_force=10
    CoordinateActuator hip_rotation_r: coordinate=hip_rotation_r optimal_force=10
    CoordinateActuator knee_angle_r: coordinate=knee_angle_r optimal_force=10
    CoordinateActuator knee_angle_r_beta: coordinate=knee_angle_r_beta optimal_force=10
    CoordinateActuator ankle_angle_r: coordinate=ankle_angle_r optimal_force=10
    CoordinateActuator subtalar_angle_r: coordinate=subtalar_angle_r optimal_force=10
    CoordinateActuator mtp_angle_r: coordinate=mtp_angle_r optimal_force=10
    CoordinateActuator hip_flexion_l: coordinate=hip_flexion_l optimal_force=10
    CoordinateActuator hip_adduction_l: coordinate=hip_adduction_l optimal_force=10
    CoordinateActuator hip_rotation_l: coordinate=hip_rotation_l optimal_force=10
    CoordinateActuator knee_angle_l: coordinate=knee_angle_l optimal_force=10
    CoordinateActuator knee_angle_l_beta: coordinate=knee_angle_l_beta optimal_force=10
    CoordinateActuator ankle_angle_l: coordinate=ankle_angle_l optimal_force=10
    CoordinateActuator subtalar_angle_l: coordinate=subtalar_angle_l optimal_force=10
    CoordinateActuator mtp_angle_l: coordinate=mtp_angle_l optimal_force=10
    ObjectGroup right_leg
    ObjectGroup left_leg
    ObjectGroup hip_add_r
    ObjectGroup hip_abd_r
    ObjectGroup hip_flex_r
    ObjectGroup hip_ext_r
    ObjectGroup hip_inrot_r
    ObjectGroup hip_exrot_r
    ObjectGroup knee_flex_r
    ObjectGroup knee_ext_r
    ObjectGroup ankle_df_r
    ObjectGroup ankle_pf_r
    ObjectGroup everter_r
    ObjectGroup inverter_r
    ObjectGroup hip_add_l
    ObjectGroup hip_abd_l
    ObjectGroup hip_flex_l
    ObjectGroup hip_ext_l
    ObjectGroup hip_exrot_l
    ObjectGroup hip_inrot_l
    ObjectGroup knee_flex_l
    ObjectGroup knee_ext_l
    ObjectGroup ankle_df_l
    ObjectGroup ankle_pf_l
    ObjectGroup everter_l
    ObjectGroup inverter_l
  MarkerSet:
    Marker C7: torso (-0.09633091 0.4441466 -0.001980214)
    Marker r_shoulder: torso (0 0.453606 0.1796438) fixed=true
    Marker l_shoulder: torso (0 0.453606 -0.1796438) fixed=true
    Marker sternum: torso (0.07000918 0.3983534 -0.002081979)
    Marker r_ASIS: pelvis (0.008129364 0.001708346 0.1270439)
    Marker l_ASIS: pelvis (0.00790506 0.0007648586 -0.1285743)
    Marker r_PSIS: pelvis (-0.2005921 0.03844316 0.05736898)
    Marker l_PSIS: pelvis (-0.2007085 0.03801354 -0.05878017)
    Marker r_knee: femur_r (0.01522832 -0.3552495 0.07820877)
    Marker r_mknee: femur_r (0.01049781 -0.3499781 -0.05496263)
    Marker r_ankle: tibia_r (-0.006624884 -0.4213162 0.04121742)
    Marker r_mankle: tibia_r (0.008822753 -0.4184486 -0.03365992)
    Marker r_toe: calcn_r (0.2057354 0.006958525 0.00224571)
    Marker r_5meta: calcn_r (0.1494706 -0.01057156 0.0588276)
    Marker r_calc: calcn_r (-0.004684883 0.0101511 -0.007943394)
    Marker l_knee: femur_l (0.01488298 -0.3558396 -0.07831947)
    Marker l_mknee: femur_l (0.01042696 -0.3503894 0.05485419)
    Marker l_ankle: tibia_l (-0.007020026 -0.4084728 -0.04075615)
    Marker l_mankle: tibia_l (0.008576964 -0.4055095 0.0340765)
    Marker l_toe: calcn_l (0.2064942 0.01966749 -0.001704153)
    Marker l_calc: calcn_l (-0.003920238 0.02328874 0.008446575)
    Marker l_5meta: calcn_l (0.1502025 0.00202713 -0.05822222)
    Marker r_melbow: humerus_r (0.002164242 -0.279785 -0.02950798) fixed=true
    Marker r_elbow: humerus_r (0.009254741 -0.2771731 0.02627046) fixed=true
    Marker r_wrist_radius: radius_r (-0.02156783 -0.2294751 0.03505887) fixed=true
    Marker r_wrist_ulna: radius_r (-0.02067629 -0.2301499 -0.006642554) fixed=true
    Marker l_melbow: humerus_l (0.002146723 -0.2775204 0.02926913) fixed=true
    Marker l_elbow: humerus_l (0.009179838 -0.2749293 -0.02605783) fixed=true
    Marker l_wrist_radius: radius_l (-0.02156871 -0.2294845 -0.03506026) fixed=true
    Marker l_wrist_ulna: radius_l (-0.0206771 -0.2301595 0.006642823) fixed=true
    Marker Neck: torso (-0.02678841 0.4066661 0.117368) fixed=true
    Marker RShoulder: torso (0.006943966 0.379938 0.1759588)
    Marker LShoulder: torso (0.01285387 0.3849725 -0.1946516)
    Marker RHip: pelvis (-0.07637062 -0.08616054 0.06115029) fixed=true
    Marker LHip: pelvis (-0.07637062 -0.08616054 -0.06115029) fixed=true
    Marker midHip: pelvis (-0.027516 -0.1065166 0) fixed=true
    Marker RKnee: tibia_r (-0.008578308 -0.003748372 -0.001574448) fixed=true
    Marker LKnee: tibia_l (-0.008580523 -0.00374934 0.001574854) fixed=true
    Marker RAnkle: tibia_r (-0.01484588 -0.4029595 0.007953148) fixed=true
    Marker LAnkle: tibia_l (-0.01484971 -0.4030635 -0.007955202) fixed=true
    Marker RHeel: calcn_r (0.0206793 0.01135852 -0.0229973) fixed=true
    Marker LHeel: calcn_l (0.02069311 0.0113661 0.02301265) fixed=true
    Marker RSmallToe: calcn_r (0.2274725 4.18708e-17 0.04599462) fixed=true
    Marker LSmallToe: calcn_l (0.2276244 4.189874e-17 -0.04602532) fixed=true
    Marker RBigToe: calcn_r (0.2584915 4.088556e-17 -0.01724803) fixed=true
    Marker LBigToe: calcn_l (0.258664 4.091285e-17 0.01725954) fixed=true
    Marker RElbow: humerus_r (0.01320066 -0.2875071 -0.009636362) fixed=true
    Marker LElbow: humerus_l (0.01309382 -0.2851801 0.009558368) fixed=true
    Marker RWrist: hand_r (0 0 0) fixed=true
    Marker LWrist: hand_l (0 0 0) fixed=true
    Marker T6: torso (-0.1167904 0.3050346 -0.001623444)
