# OpenSim document version 40600
ScaleTool LaiUhlrich2022_torque_only_scaled:
  mass: 75 [kg]
  height: 1.75
  age: -1
  GenericModelMaker:
    model_file: /Users/enricomartini/Desktop/opensim-batch-dynamics/outputs/OpenSim/Model/swing_weldfix_check/LaiUhlrich2022_torque_only_generic.osim
  ModelScaler:
    apply: true
    scaling_order: measurements
    marker_file: /Users/enricomartini/Desktop/opensim-batch-dynamics/outputs/OpenSim/Model/swing_weldfix_check/neutral.trc
    time_range: 0 1
    preserve_mass_distribution: true
    MeasurementSet:
      Measurement foot_r: apply=true
        MarkerPair: markers=(r_calc r_toe)
        MarkerPair: markers=(r_calc r_5meta)
        BodyScale talus_r: axes=(X Y Z)
        BodyScale calcn_r: axes=(X Y Z)
        BodyScale toes_r: axes=(X Y Z)
      Measurement tibia_r: apply=true
        MarkerPair: markers=(r_knee r_ankle)
        MarkerPair: markers=(r_mknee r_mankle)
        BodyScale tibia_r: axes=(X Y Z)
      Measurement femur_r: apply=true
        MarkerPair: markers=(RHip r_knee)
        BodyScale femur_r: axes=(X Y Z)
        BodyScale patella_r: axes=(X Y Z)
      Measurement tibia_l: apply=true
        MarkerPair: markers=(l_knee l_ankle)
        MarkerPair: markers=(l_mknee l_mankle)
        BodyScale tibia_l: axes=(X Y Z)
      Measurement femur_l: apply=true
        MarkerPair: markers=(LHip l_knee)
        BodyScale femur_l: axes=(X Y Z)
        BodyScale patella_l: axes=(X Y Z)
      Measurement pelvisXY: apply=true
        MarkerPair: markers=(r_ASIS r_PSIS)
        MarkerPair: markers=(l_ASIS l_PSIS)
        BodyScale pelvis: axes=(X Y)
      Measurement pelvisZ: apply=true
        MarkerPair: markers=(LHip RHip)
        BodyScale pelvis: axes=Z
      Measurement torsoY: apply=true
        MarkerPair: markers=(RShoulder r_PSIS)
        MarkerPair: markers=(LShoulder l_PSIS)
        MarkerPair: markers=(C7 l_PSIS)
        BodyScale torso: axes=Y
      Measurement torsoZ: apply=true
        MarkerPair: markers=(RShoulder LShoulder)
        BodyScale torso: axes=Z
      Measurement humerus_r: apply=true
        MarkerPair: markers=(C7 r_elbow)
        MarkerPair: markers=(C7 r_melbow)
        BodyScale humerus_r: axes=(X Y Z)
      Measurement humerus_l: apply=true
        MarkerPair: markers=(C7 l_elbow)
        MarkerPair: markers=(C7 l_melbow)
        BodyScale humerus_l: axes=(X Y Z)
      Measurement radius_r: apply=true
        MarkerPair: markers=(r_wrist_ulna r_elbow)
        MarkerPair: markers=(r_wrist_radius r_melbow)
        BodyScale ulna_r: axes=(X Y Z)
        BodyScale radius_r: axes=(X Y Z)
        BodyScale hand_r: axes=(X Y Z)
      Measurement radius_l: apply=true
        MarkerPair: markers=(l_wrist_ulna l_elbow)
        MarkerPair: markers=(l_wrist_radius l_melbow)
        BodyScale ulna_l: axes=(X Y Z)
        BodyScale radius_l: axes=(X Y Z)
        BodyScale hand_l: axes=(X Y Z)
      Measurement torsoX: apply=true
        MarkerPair: markers=(C7 sternum)
        BodyScale torso: axes=X
      Measurement foot_l: apply=true
        MarkerPair: markers=(l_calc l_toe)
        MarkerPair: markers=(l_calc l_5meta)
        BodyScale talus_l: axes=(X Y Z)
        BodyScale calcn_l: axes=(X Y Z)
        BodyScale toes_l: axes=(X Y Z)
  MarkerPlacer:
    apply: true
    marker_file: /Users/enricomartini/Desktop/opensim-batch-dynamics/outputs/OpenSim/Model/swing_weldfix_check/neutral.trc
    time_range: 0 1
    output_motion_file: /Users/enricomartini/Desktop/opensim-batch-dynamics/outputs/OpenSim/Model/swing_weldfix_check/LaiUhlrich2022_torque_only_scaled.mot
    output_model_file: /Users/enricomartini/Desktop/opensim-batch-dynamics/outputs/OpenSim/Model/swing_weldfix_check/LaiUhlrich2022_torque_only_scaled.osim
    max_marker_movement: -1
    IKTaskSet:
      IKMarkerTask C7: apply=true weight=20
      IKMarkerTask sternum: apply=true weight=5
      IKMarkerTask r_ASIS: apply=true weight=10
      IKMarkerTask l_ASIS: apply=true weight=10
      IKMarkerTask r_PSIS: apply=true weight=10
      IKMarkerTask l_PSIS: apply=true weight=10
      IKMarkerTask r_knee: apply=true weight=10
      IKMarkerTask r_mknee: apply=true weight=10
      IKMarkerTask r_ankle: apply=true weight=10
      IKMarkerTask r_mankle: apply=true weight=10
      IKMarkerTask r_toe: apply=true weight=10
      IKMarkerTask r_5meta: apply=true weight=10
      IKMarkerTask r_calc: apply=true weight=10
      IKMarkerTask l_knee: apply=true weight=10
      IKMarkerTask l_mknee: apply=true weight=10
      IKMarkerTask l_ankle: apply=true weight=10
      IKMarkerTask l_mankle: apply=true weight=10
      IKMarkerTask l_toe: apply=true weight=10
      IKMarkerTask l_calc: apply=true weight=10
      IKMarkerTask l_5meta: apply=true weight=10
      IKMarkerTask r_melbow: apply=false weight=20
      IKMarkerTask r_elbow: apply=false weight=20
      IKMarkerTask r_wrist_radius: apply=false weight=20
      IKMarkerTask r_wrist_ulna: apply=false weight=20
      IKMarkerTask l_melbow: apply=false weight=5
      IKMarkerTask l_elbow: apply=false weight=5
      IKMarkerTask l_wrist_radius: apply=false weight=5
      IKMarkerTask l_wrist_ulna: apply=false weight=5
      IKMarkerTask RShoulder: apply=false weight=20
      IKMarkerTask LShoulder: apply=false weight=20
      IKMarkerTask RHip: apply=true weight=20
      IKMarkerTask LHip: apply=true weight=20
      IKCoordinateTask [values shared by the 11 below unless stated]: apply=true weight=0.1 value_type=manual_value
          value=0
      IKCoordinateTask hip_flexion_r
      IKCoordinateTask hip_rotation_r: apply=false
      IKCoordinateTask knee_angle_r
      IKCoordinateTask ankle_angle_r: value=0.08726646
      IKCoordinateTask hip_flexion_l
      IKCoordinateTask hip_rotation_l: apply=false
      IKCoordinateTask knee_angle_l
      IKCoordinateTask ankle_angle_l: value=0.08726646
      IKCoordinateTask lumbar_extension
      IKCoordinateTask lumbar_bending
      IKCoordinateTask lumbar_rotation
